// SBML level 2 version 4

model NewModel()

  // Compartments:
  compartment compartment = 1;

  // Species:
  species $X in compartment = 0;
  species GTP in compartment = 1;
  species CodY in compartment = 10;
  species Complex in compartment = 0;
  species Pe in compartment = 50;
  species Pin in compartment = 0.02;
  species Pa in compartment = 0.1;
  species R in compartment = 0;
  species Kb in compartment = 0;
  species SFP in compartment = 1;
  species SAP in compartment = 1;

  // Parameters:
  a = 5;
  b = 0.02;
  c = 0.001;
  d = 0.1;
  e = 0.4;
  f = 20;
  g = 20;
  h = 0.002;
  i = 0.002;
  l = 5;
  m = 0.001;
  n = 0.02;
  o = 20;
  p = 20;
  q = 20;
  r = 0.02;
  s = 0.083;
  t = 0.02;
  u = 2;
  v = 2;
  w = 0.0004;
  x = 0.002;
  y = 10;
  z = 20;
  aa = 20;
  bb = 0.1;
  cc = 1.7e-8;
  dd = 0.002;
  ee = 0.001;
  ff = 0.0004;
  gg = 0.01;
  hh = 0.002;
  ii = 0.05;
  jj = 8e-5;

  // Reactions:
  _J0: $X => GTP; a - b*GTP - c*CodY*GTP + d*Complex;  // modifiers: CodY, Complex
  _J1: $X => CodY; e*f/(g*CodY + f) - c*CodY*GTP + d*Complex - h*CodY;  // modifiers: GTP, Complex
  _J2: $X => Complex; c*CodY*GTP - d*Complex - i*Complex;  // modifiers: CodY, GTP
  _J3: $X => Pe; l + m*Pin - n*Pe;  // modifiers: Pin
  _J4: $X => Pin; o*p/(q*Complex + p) - m*Pin - r*Pin;  // modifiers: Complex
  _J5: $X => Pa; m*Pin - s*R*Pa - t*Pa;  // modifiers: Pin, R
  _J6: $X => R; o*u/(v*CodY + u) - w*R*SFP - s*R*Pa - x*R;  // modifiers: CodY, SFP, Pa
  _J7: $X => Kb; y*z/(aa*CodY + z) - bb*Kb - cc*Kb*SFP - dd*Kb;  // modifiers: CodY, SFP
  _J8: $X => SFP; ee*Kb*SFP - w*R*SFP - ff*SFP - gg*SFP*SAP - hh*SFP;  // modifiers: Kb, R, SAP
  _J9: $X => SAP; gg*SAP*SFP - ii*SAP - jj*SAP;  // modifiers: SFP
end
